Simulations: Version=59
  Replacements
    Plant FieldPea: CropType=FieldPea; IsEnding=false; DaysAfterEnding=0
      Memo Memo1
        ## References

        ### **Ayaz S, McKenzie BA, McNeil DL, Hill GD.2004**. Light interception and utilization of four grain legumes sown at different plant populations and depths. _Journal of Agricultural Science,_**142**: 297-308.
         **Ayaz S, McKenzie BA, Hill GD, McNeil DL.2004**. Variability in yield of four grain legume species in a subhumid temperate environment. II. Yield components. _Journal of Agricultural Science,_**142**: 21-28.
         **Ayaz S, McKenzie BA, Hill GD, McNeil DL.2004**. Nitrogen distribution in four grain legumes. _Journal of Agricultural Science,_**142**: 309-317.
         **Wilson DR, Robertson MJ.1996.**Pea phenology responses to temperature and photoperiod. _Australian Agronomy Society_.
      OrganArbitrator Arbitrator
        RelativeAllocation NArbitrator
        RelativeAllocation DMArbitrator
      Phenology
        AirTemperatureFunction ThermalTime
          XYPairs: X=[4.5, 30, 40]; Y=[0, 25.5, 0]
        PhotoperiodFunction Photoperiod: Twilight=-6; DayLength=0
        GerminatingPhase Germinating: Start=Sowing; End=Germination
        EmergingPhase Emerging: ShootLag=15; ShootRate=5; Start=Germination; End=Emergence; TTForTimeStep=0
          VariableReference ThermalTime: VariableName=[Phenology].ThermalTime.Value()
          VariableReference ThermalTime1: VariableName=[Phenology].ThermalTime.Value()
        NodeNumberPhase Vegetative: Start=Emergence; End=StartFlowering
          LinearInterpolationFunction CompletionNodeNumber: XProperty=[Phenology].Photoperiod.Value()
            XYPairs: X=[13, 16]; Y=[18, 15]
          VariableReference ThermalTime: VariableName=[Phenology].ThermalTime.Value()
        NodeNumberPhase Flowering: Start=StartFlowering; End=EndFlowering
          AddFunction CompletionNodeNumber
            VariableReference VegetativeNodes: VariableName=[Phenology].NFF.Value()
            LinearInterpolationFunction FloweringNodes: XProperty=[Phenology].Photoperiod.Value()
              XYPairs: X=[13, 16]; Y=[10, 7]
          MultiplyFunction Target
            VariableReference NodeNumberDuration
              VariableName=[Phenology].Flowering.CompletionNodeNumber.FloweringNodes.Value()
            VariableReference Phyllochron: VariableName=[Structure].Phyllochron.Value()
          VariableReference ThermalTime: VariableName=[Phenology].ThermalTime.Value()
        GenericPhase GrainFilling: Start=EndFlowering; End=EndGrainFill
          Constant Target: FixedValue=500
          VariableReference Progression: VariableName=[Phenology].ThermalTime.Value()
        GenericPhase Maturing: Start=EndGrainFill; End=Maturity
          Constant Target: FixedValue=60
          VariableReference Progression: VariableName=[Phenology].ThermalTime.Value()
        GenericPhase Ripening: Start=Maturity; End=HarvestRipe
          Constant Target: FixedValue=1
          VariableReference Progression: VariableName=[Phenology].ThermalTime.Value()
        EndPhase ReadyForHarvesting: Start=HarvestRipe; End=Unused
          VariableReference ThermalTime: VariableName=[Phenology].ThermalTime.Value()
        OnEventFunction NFF: SetEvent=StartFlowering; ReSetEvent=never
          Constant PreEventValue: FixedValue=0
          VariableReference PostEventValue: VariableName=[Phenology].Vegetative.CompletionNodeNumber.Value()
        OnEventFunction FN: SetEvent=EndFlowering; ReSetEvent=never
          Constant PreEventValue: FixedValue=0
          SubtractFunction PostEventValue
            VariableReference PostEventValue: VariableName=[Structure].LeafTipsAppeared
            VariableReference PostEventValue1: VariableName=[Phenology].NFF.Value()
      Structure: CohortInitialisationStage=Germination; LeafInitialisationStage=Emergence
        VariableReference ThermalTime: VariableName=[Phenology].ThermalTime.Value()
        Constant DroughtInducedBranchMortality: FixedValue=0
        Constant FinalLeafNumber: FixedValue=60
        LinearInterpolationFunction HeightModel: XProperty=[Stem].Live.Wt
          XYPairs: X=[0, 300]; Y=[10, 750]
        MultiplyFunction BranchingRate
          LinearInterpolationFunction Potential_Branching_Rate: XProperty=[Structure].LeafTipsAppeared
            XYPairs: X=[0, 4, 5, 7, 8]; Y=[0, 0, 1, 1, 0]
          LinearInterpolationFunction Cover_response: XProperty=[leaf].CoverGreen
            XYPairs: X=[0, 0.17, 0.25]; Y=[1, 1, 0]
          LinearInterpolationFunction CHO_response: XProperty=[Stem].Live.StorageWt
            XYPairs: X=[0, 1, 10]; Y=[1, 1, 1]
        Constant BranchMortality: FixedValue=0
        PhaseLookup Phyllochron
          PhaseLookupValue Vegetative: Start=Emergence; End=StartFlowering
            Constant Function: FixedValue=30
          PhaseLookupValue Flowering: Start=StartFlowering; End=EndFlowering
            Constant Function: FixedValue=40
        Constant StemSenescenceAge: FixedValue=0
      ReproductiveOrgan Grain: GrowthRespiration=0; MaintenanceRespiration=0
        Biomass Live: DMDOfStructural=0.6
        Biomass Dead: DMDOfStructural=0.6
        Constant MaximumPotentialGrainSize: FixedValue=0.4
        PhaseLookup DMDemandFunction
          PhaseLookupValue GrainFilling: Start=StartFlowering; End=EndGrainFill
            FillingRateFunction
              VariableReference NumberFunction: VariableName=[Grain].NumberFunction.Value()
              AddFunction FillingDuration
                VariableReference FillingDuration: VariableName=[Phenology].GrainFilling.Target.Value()
                VariableReference FillingDuration1: VariableName=[Phenology].GrainFilling.Target.Value()
              VariableReference ThermalTime: VariableName=[Phenology].ThermalTime.Value()
              VariableReference PotentialSizeIncrement: VariableName=[Grain].MaximumPotentialGrainSize.Value()
        Constant MinimumNConc: FixedValue=0.02
        Constant MaximumNConc: FixedValue=0.03
        Constant WaterContent: FixedValue=0.12
        PhaseLookup NFillingRate
          PhaseLookupValue GrainFilling: Start=StartFlowering; End=EndGrainFill
            FillingRateFunction
              VariableReference NumberFunction: VariableName=[Grain].NumberFunction.Value()
              AddFunction FillingDuration
                VariableReference FillingDuration: VariableName=[Phenology].Flowering.Target.Value()
                VariableReference FillingDuration1: VariableName=[Phenology].GrainFilling.Target.Value()
              VariableReference ThermalTime: VariableName=[Phenology].ThermalTime.Value()
              MultiplyFunction PotentialSizeIncrement
                Constant MaximumFinalNConc: FixedValue=0.04
                VariableReference MaximumSize: VariableName=[Grain].MaximumPotentialGrainSize.Value()
        MultiplyFunction NumberFunction
          Constant PeasPerPod: FixedValue=3
          VariableReference PodNumber: VariableName=[Shell].PodNumber.Value()
        BiomassRemoval BiomassRemovalDefaults
          OrganBiomassRemovalType Harvest: FractionLiveToRemove=1; FractionDeadToRemove=0; FractionLiveToResidue=0; FractionDeadToResidue=0
          OrganBiomassRemovalType Cut: FractionLiveToRemove=1; FractionDeadToRemove=0; FractionLiveToResidue=0; FractionDeadToResidue=0
          OrganBiomassRemovalType Prune: FractionLiveToRemove=0; FractionDeadToRemove=0; FractionLiveToResidue=0.8; FractionDeadToResidue=0
          OrganBiomassRemovalType Graze: FractionLiveToRemove=0.6; FractionDeadToRemove=0; FractionLiveToResidue=0.2; FractionDeadToResidue=0
        Constant DMConversionEfficiency: FixedValue=1
        Constant RemobilisationCost: FixedValue=0
        Constant CarbonConcentration: FixedValue=0.4
      Root: GrowthRespiration=0; MaintenanceRespiration=0; RootAngle=45; SWAvailabilityRatio=0
        LinearInterpolationFunction KLModifier: XProperty=[Leaf].LAI
          XYPairs: X=[0, 3]; Y=[1, 1]
        AirTemperatureFunction TemperatureEffect
          XYPairs: X=[0, 26, 35]; Y=[1, 1, 1]
        Constant MaxDailyNUptake: FixedValue=6
        Constant SenescenceRate: FixedValue=0
        Constant MaximumRootDepth: FixedValue=1000000
        PhaseLookup RootFrontVelocity
          PhaseLookupValue PreEmergence: Start=Germination; End=Emergence
            Constant Function: FixedValue=3
          PhaseLookupValue early: Start=Emergence; End=StartFlowering
            Constant Function: FixedValue=15
          PhaseLookupValue late: Start=StartFlowering; End=Maturity
            Constant Function: FixedValue=17
        Constant MaximumNConc: FixedValue=0.01
        Constant MinimumNConc: FixedValue=0.005
        PhaseBasedSwitch NitrogenDemandSwitch: Start=Emergence; End=EndGrainFill
        LinearInterpolationFunction KNO3: XProperty=[Root].LengthDensity
          XYPairs: X=[0, 0.003]; Y=[0.02, 0.02]
        LinearInterpolationFunction KNH4: XProperty=[Root].LengthDensity
          XYPairs: X=[0, 0.003]; Y=[0, 0]
        BiomassRemoval BiomassRemovalDefaults
          OrganBiomassRemovalType Harvest: FractionLiveToRemove=0; FractionDeadToRemove=0; FractionLiveToResidue=0.2; FractionDeadToResidue=0
          OrganBiomassRemovalType Cut: FractionLiveToRemove=0; FractionDeadToRemove=0; FractionLiveToResidue=0.3; FractionDeadToResidue=0
          OrganBiomassRemovalType Prune: FractionLiveToRemove=0; FractionDeadToRemove=0; FractionLiveToResidue=0.1; FractionDeadToResidue=0
          OrganBiomassRemovalType Graze: FractionLiveToRemove=0; FractionDeadToRemove=0; FractionLiveToResidue=0.15; FractionDeadToResidue=0
        LinearInterpolationFunction NUptakeSWFactor: XProperty=[Root].RWC
          XYPairs: X=[0, 1]; Y=[0, 1]
        Constant InitialDM: FixedValue=0.2; Units=g/plant
        Constant SpecificRootLength: FixedValue=40; Units=m/g
        Constant DMConversionEfficiency: FixedValue=1
        Constant MaintenanceRespirationFunction: FixedValue=1
        Constant RemobilisationCost: FixedValue=0
        Constant CarbonConcentration: FixedValue=0.4
        BiomassDemand DMDemands
          MultiplyFunction Structural
            PartitionFractionDemandFunction DMDemandFunction
              PhaseLookup PartitionFraction
                PhaseLookupValue Early: Start=Emergence; End=StartFlowering
                  Constant Function: FixedValue=0.1
                PhaseLookupValue Middle: Start=StartFlowering; End=EndFlowering
                  Constant Function: FixedValue=0.08
                PhaseLookupValue Late: Start=EndFlowering; End=Maturity
                  Constant Function: FixedValue=0
            Constant StructuralFraction: FixedValue=1
          Constant Metabolic: FixedValue=0
          StorageDMDemandFunction Storage
            SubtractFunction StorageFraction
              Constant One: FixedValue=1
              VariableReference StructuralFraction: VariableName=[Root].DMDemands.Structural.StructuralFraction.Value()
        BiomassDemand NDemands
          MultiplyFunction Structural
            VariableReference MinNconc: VariableName=[Root].minimumNconc.Value()
            VariableReference PotentialDMAllocation: VariableName=[Root].potentialDMAllocation.Structural
          MultiplyFunction Metabolic
            SubtractFunction MetabolicNconc
              VariableReference CritNconc: VariableName=[Root].criticalNConc.Value()
              VariableReference MinNconc: VariableName=[Root].minimumNconc.Value()
            VariableReference PotentialDMAllocation: VariableName=[Root].potentialDMAllocation.Structural
          StorageNDemandFunction Storage
            VariableReference NitrogenDemandSwitch: VariableName=[Root].nitrogenDemandSwitch.Value()
            VariableReference MaxNconc: VariableName=[Root].maximumNconc.Value()
      Nodule
        Constant FixationMetabolicCost: FixedValue=7
        Constant MaximumNConc: FixedValue=0.02
        Constant MinimumNConc: FixedValue=0.01
        Constant SenescenceRate: FixedValue=0
        Constant NReallocationFactor: FixedValue=0
        PhaseBasedSwitch NitrogenDemandSwitch: Start=Emergence; End=EndGrainFill
        BiomassRemoval BiomassRemovalDefaults
          OrganBiomassRemovalType Harvest: FractionLiveToRemove=0.5; FractionDeadToRemove=0; FractionLiveToResidue=0.1; FractionDeadToResidue=0
          OrganBiomassRemovalType Cut: FractionLiveToRemove=0.8; FractionDeadToRemove=0; FractionLiveToResidue=0; FractionDeadToResidue=0
          OrganBiomassRemovalType Prune: FractionLiveToRemove=0; FractionDeadToRemove=0; FractionLiveToResidue=0.6; FractionDeadToResidue=0
          OrganBiomassRemovalType Graze: FractionLiveToRemove=0.6; FractionDeadToRemove=0; FractionLiveToResidue=0.2; FractionDeadToResidue=0
        Constant InitialWtFunction: FixedValue=0; Units=g/m^2
        Constant DetachmentRateFunction: FixedValue=0; Units=/d
        MultiplyFunction FixationRate
          VariableReference NoduleWt: VariableName=[Nodule].Live.Wt
          Constant SpecificNitrogenaseActivity: FixedValue=4.5
          MinimumFunction
            AirTemperatureFunction FT
              XYPairs: X=[0, 20, 30, 40]; Y=[0, 1, 1, 0]
            LinearInterpolationFunction FW: XProperty=[Leaf].Fw
              XYPairs: X=[0, 1, 1.5]; Y=[0, 1, 1]
            LinearInterpolationFunction FWlog: XProperty=[Leaf].Fw
              XYPairs: X=[0, 1, 1.5]; Y=[1, 1, 1]
        Constant MaintenanceRespirationFunction: FixedValue=0; Units=0-1
        Constant DMConversionEfficiency: FixedValue=1; Units=0-1
        Constant NRetranslocationFactor: FixedValue=0
        Constant DMReallocationFactor: FixedValue=0
        Constant DMRetranslocationFactor: FixedValue=0
        VariableReference CriticalNConc: VariableName=[Nodule].MinimumNConc.Value()
        Constant RemobilisationCost: FixedValue=0
        Constant CarbonConcentration: FixedValue=0.4
        BiomassDemand DMDemands
          MultiplyFunction Structural
            PartitionFractionDemandFunction DMDemandFunction
              PhaseLookup PartitionFraction
                PhaseLookupValue Early: Start=Emergence; End=StartFlowering
                  Constant Function: FixedValue=0.03
                PhaseLookupValue Middle: Start=StartFlowering; End=EndFlowering
                  Constant Function: FixedValue=0.02
                PhaseLookupValue Late: Start=EndFlowering; End=Maturity
                  Constant Function: FixedValue=0
            Constant StructuralFraction: FixedValue=1; Units=g/g
          Constant Metabolic: FixedValue=0
          StorageDMDemandFunction Storage
            SubtractFunction StorageFraction
              Constant One: FixedValue=1
              VariableReference StructuralFraction: VariableName=[Nodule].DMDemands.Structural.StructuralFraction.Value()
        BiomassDemand NDemands
          MultiplyFunction Structural
            VariableReference MinNconc: VariableName=[Nodule].minimumNconc.Value()
            VariableReference PotentialDMAllocation: VariableName=[Nodule].potentialDMAllocation.Structural
          MultiplyFunction Metabolic
            SubtractFunction MetabolicNconc
              VariableReference CritNconc: VariableName=[Nodule].criticalNConc.Value()
              VariableReference MinNconc: VariableName=[Nodule].minimumNconc.Value()
            VariableReference PotentialDMAllocation: VariableName=[Nodule].potentialDMAllocation.Structural
          StorageNDemandFunction Storage
            VariableReference NitrogenDemandSwitch: VariableName=[Nodule].nitrogenDemandSwitch.Value()
            VariableReference MaxNconc: VariableName=[Nodule].maximumNconc.Value()
      GenericOrgan Shell
        EnergyBalance: Albedo=0.2; Gsmax350=0.015; R50=150; KDead=0; LAIDead=0
          MinimumFunction FRGRFunction
            VariableReference RUE_FT: VariableName=[Stem].Photosynthesis.FT.Value()
            MinimumFunction Others
              VariableReference RUE_FN: VariableName=[Stem].Photosynthesis.FN.Value()
              VariableReference RUE_FVPD: VariableName=[Stem].Photosynthesis.FVPD.Value()
          Constant StomatalConductanceCO2Modifier: FixedValue=1
          VariableReference HeightFunction: VariableName=[FieldPea].Leaf.Height
          Constant GAIDeadFunction: FixedValue=1
          Constant ExtinctionCoefficientFunction: FixedValue=0.4
          MultiplyFunction GAIFunction
            Constant MassToArea: FixedValue=0.00267
            VariableReference Weight: VariableName=[Shell].Live.Wt
          MultiplyFunction DepthFunction
            VariableReference HeightFunction: VariableName=[FieldPea].Leaf.Height
            Constant PC: FixedValue=0.2
        Constant NReallocationFactor: FixedValue=0
        Constant NRetranslocationFactor: FixedValue=0.1
        Constant MaximumNConc: FixedValue=0.03
        Constant MinimumNConc: FixedValue=0.01
        Constant DMRetranslocationFactor: FixedValue=0.1
        PhaseBasedSwitch NitrogenDemandSwitch: Start=Germination; End=Maturity
        MultiplyFunction PodNumber
          Constant PodsPerNode: FixedValue=1
          VariableReference StemPopulation: VariableName=[Structure].TotalStemPopn
          PhaseLookupValue FloweringNodes: Start=StartFlowering; End=HarvestRipe
            SubtractFunction FloweringNodes
              VariableReference TotalNodes: VariableName=[Structure].LeafTipsAppeared
              VariableReference VegetativeNodes: VariableName=[Phenology].NFF.Value()
        BiomassRemoval BiomassRemovalDefaults: same as Replacements.FieldPea.Nodule.BiomassRemovalDefaults
        Constant InitialWtFunction: FixedValue=0; Units=g/m^2
        Constant SenescenceRate: FixedValue=0; Units=/d
        Constant DetachmentRateFunction: FixedValue=0; Units=/d
        Constant MaintenanceRespirationFunction: FixedValue=0; Units=0-1
        Constant DMConversionEfficiency: FixedValue=1; Units=0-1
        Constant DMReallocationFactor: FixedValue=0
        VariableReference CriticalNConc: VariableName=[Shell].MinimumNConc.Value()
        Constant RemobilisationCost: FixedValue=0
        Constant CarbonConcentration: FixedValue=0.4
        BiomassDemand DMDemands
          MultiplyFunction Structural
            PopulationBasedDemandFunction DMDemandFunction
              VariableReference ThermalTime: VariableName=[Phenology].ThermalTime.Value()
              VariableReference OrganPopulation: VariableName=[Shell].PodNumber.Value()
              Constant ExpansionStress: FixedValue=1
              AddFunction GrowthDuration
                VariableReference FloweringGrowthPeriod: VariableName=[Phenology].Flowering.Target.Value()
                Constant PostFloweringGrowthPeriod: FixedValue=60
              Constant StartStage: FixedValue=4
              Constant MaximumOrganWt: FixedValue=0.3
            Constant StructuralFraction: FixedValue=0.7
          Constant Metabolic: FixedValue=0
          StorageDMDemandFunction Storage
            SubtractFunction StorageFraction
              Constant One: FixedValue=1
              VariableReference StructuralFraction: VariableName=[Shell].DMDemands.Structural.StructuralFraction.Value()
        BiomassDemand NDemands
          MultiplyFunction Structural
            VariableReference MinNconc: VariableName=[Shell].minimumNconc.Value()
            VariableReference PotentialDMAllocation: VariableName=[Shell].potentialDMAllocation.Structural
          MultiplyFunction Metabolic
            SubtractFunction MetabolicNconc
              VariableReference CritNconc: VariableName=[Shell].criticalNConc.Value()
              VariableReference MinNconc: VariableName=[Shell].minimumNconc.Value()
            VariableReference PotentialDMAllocation: VariableName=[Shell].potentialDMAllocation.Structural
          StorageNDemandFunction Storage
            VariableReference NitrogenDemandSwitch: VariableName=[Shell].nitrogenDemandSwitch.Value()
            VariableReference MaxNconc: VariableName=[Shell].maximumNconc.Value()
        RUEModel Photosynthesis
          Constant RUE: FixedValue=1
          WeightedTemperatureFunction FT: MaximumTemperatureWeighting=0.5
            XYPairs: X=[0, 15, 30, 40]; Y=[0, 1, 1, 0]
          LinearInterpolationFunction FVPD: XProperty=[Leaf].Photosynthesis.VPD
            XYPairs: X=[0, 10, 50]; Y=[1, 1, 1]
          LinearInterpolationFunction FN: XProperty=[Leaf].Fn
            XYPairs: X=[0, 1, 1.5]; Y=[1, 1, 1]
          LinearInterpolationFunction FW: XProperty=[Leaf].Fw
            XYPairs: X=[0, 1, 1.5]; Y=[1, 1, 1]
          RUECO2Function FCO2: PhotosyntheticPathway=C3
          Memo
            Ayaz eta 2004 presented a RUE of 1.6 g/MJ PAR during non-limiting temperature conditions for field pea.  Halving this to make it total radiation gives 0.8 g/MJ and adding 20% to account for root and  nodule production and N fixiation costs gives 1.0 g/MJ
          VariableReference RadnInt: VariableName=[Shell].EnergyBalance.RadIntTot
        RetranslocateNonStructural RetranslocateNitrogen
      Leaf: MaxCover=1; Albedo=0.2; Gsmax350=0.015; R50=150; MicroClimatePresent=true; KDead=0.3; MaximumMainStemLeafNumber=40
        zero: CurrentExpandingLeaf, StartFractionExpanded, FractionNextleafExpanded, DeadNodesYesterday, GrowthRespiration, FRGR, PotentialEP, WaterDemand, TipsAtEmergence, CohortsAtInitialisation, FractionDied
        LeafCohort InitialLeaf1: Rank=1; Area=100
          zero: NReallocationFactor, DMReallocationFactor, NRetranslocationFactor, DMRetranslocationFactor, ShadeInducedSenRate, SenescedFrac, DeltaPotentialArea, DeltaStressConstrainedArea, DeltaCarbonConstrainedArea, PotentialStructuralDMAllocation, PotentialMetabolicDMAllocation, MetabolicNReallocated, MetabolicWtReallocated, StorageNReallocated, StorageWtReallocated, MetabolicNRetranslocated, StorageNRetrasnlocated, DMRetranslocated, MetabolicNAllocation, StructuralDMAllocation, MetabolicDMAllocation, MaintenanceRespiration
        LeafCohort InitialLeaf2: Rank=2
          zero: NReallocationFactor, DMReallocationFactor, NRetranslocationFactor, DMRetranslocationFactor, ShadeInducedSenRate, SenescedFrac, DeltaPotentialArea, DeltaStressConstrainedArea, DeltaCarbonConstrainedArea, PotentialStructuralDMAllocation, PotentialMetabolicDMAllocation, MetabolicNReallocated, MetabolicWtReallocated, StorageNReallocated, StorageWtReallocated, MetabolicNRetranslocated, StorageNRetrasnlocated, DMRetranslocated, MetabolicNAllocation, StructuralDMAllocation, MetabolicDMAllocation, Area, MaintenanceRespiration
        VariableReference ThermalTime: VariableName=[Phenology].ThermalTime.Value()
        LeafCohortParameters: ExpansionStressValue=0
          Constant SenessingLeafRelativeSize: FixedValue=1; Units=0-1
          LinearInterpolationFunction GrowthDuration: XProperty=[Phenology].Stage
            XYPairs: X=[1, 4.5, 6]; Y=[90, 90, 40]
          LinearInterpolationFunction MaxArea: XProperty=[Phenology].Stage
            XYPairs: X=[1, 2, 3, 4, 5, 6, 7, 8]; Y=[0, 1000, 2000, 3000, 4000, 2000, 0, 0]
          LinearInterpolationFunction LagDuration: XProperty=[Phenology].Stage
            XYPairs: X=[1, 4.5, 4.75, 5, 6]; Y=[400, 400, 200, 100, 50]
          LinearInterpolationFunction SenescenceDuration: XProperty=[Phenology].Stage
            XYPairs: X=[1, 5, 5.5, 6]; Y=[80, 80, 40, 10]
          Constant DetachmentLagDuration: FixedValue=1000000
          Constant DetachmentDuration: FixedValue=1000000
          LinearInterpolationFunction SpecificLeafAreaMax: XProperty=[Leaf].LAI
            XYPairs: X=[0, 4, 6, 8]; Y=[90000, 30000, 30000, 30000]
          Constant StructuralFraction: FixedValue=0.5
          LinearInterpolationFunction SpecificLeafAreaMin: XProperty=[Leaf].LAI
            XYPairs: X=[0, 4, 6, 8]; Y=[45000, 20000, 20000, 20000]
          LinearInterpolationFunction ExpansionStress: XProperty=[FieldPea].Leaf.Fw
            XYPairs: X=[0, 1]; Y=[0, 1]
          Constant MinimumNConc: FixedValue=0.02
          Constant CriticalNConc: FixedValue=0.048
          Constant MaximumNConc: FixedValue=0.07
          Constant NReallocationFactor: FixedValue=1
          Constant NRetranslocationFactor: FixedValue=0.95
          Constant DMRetranslocationFactor: FixedValue=0.5
          LinearInterpolationFunction ShadeInducedSenescenceRate: XProperty=[Leaf].CohortCurrentRankCoverAbove
            XYPairs: X=[0, 0.9, 0.90001]; Y=[0, 0, 0]
          Constant InitialNConc: FixedValue=0.04
          Constant StorageFraction: FixedValue=0
          Constant DMReallocationFactor: FixedValue=0.8
          Constant LeafSizeShapeParameter: FixedValue=0.01
          Constant MaintenanceRespirationFunction: FixedValue=0
          Constant DroughtInducedSenAcceleration: FixedValue=1
          Constant CellDivisionStress: FixedValue=1; Units=0-1
          Constant CellDivisionStress1: FixedValue=1; Units=0-1
          Constant CellDivisionStress2: FixedValue=1; Units=0-1
          Constant CellDivisionStress3: FixedValue=1; Units=0-1
          Constant CellDivisionStress4: FixedValue=1; Units=0-1
          Constant DroughtInducedLagAcceleration: FixedValue=1
          ArrayFunction LagDurationAgeMultiplier: Values=1 1 1
          ArrayFunction SenescenceDurationAgeMultiplier: Values=1 1 1
          ArrayFunction LeafSizeAgeMultiplier: Values=1 1 1 1 1 1 1 1 1 1 1 1
          Constant RemobilisationCost: FixedValue=0
          Constant CarbonConcentration: FixedValue=0.4
        LinearInterpolationFunction ExtinctionCoeff: XProperty=[Leaf].LAI
          XYPairs: X=[0, 0.5]; Y=[0.7, 0.7]
        RUEModel Photosynthesis
          Constant RUE: FixedValue=1.5
          WeightedTemperatureFunction FT: MaximumTemperatureWeighting=0.5
            XYPairs: X=[0, 15, 30, 40]; Y=[0, 1, 1, 0]
          LinearInterpolationFunction FVPD: XProperty=[Leaf].Photosynthesis.VPD
            XYPairs: X=[0, 10, 50]; Y=[1, 1, 1]
          LinearInterpolationFunction FN: XProperty=[Leaf].Fn
            XYPairs: X=[0, 1, 1.5]; Y=[1, 1, 1]
          LinearInterpolationFunction FW: XProperty=[Leaf].Fw
            XYPairs: X=[0, 1, 1.5]; Y=[1, 1, 1]
          RUECO2Function FCO2: PhotosyntheticPathway=C3
          Memo
            Ayaz eta 2004 presented a RUE of 1.6 g/MJ PAR during non-limiting temperature conditions for field pea.  Halving this to make it total radiation gives 0.8 g/MJ and adding 20% to account for root and  nodule production and N fixiation costs gives 1.0 g/MJ
          VariableReference RadnInt: VariableName=[Leaf].RadIntTot
        MinimumFunction FRGRFunction
          VariableReference RUE_FT: VariableName=[Leaf].Photosynthesis.FT.Value()
          MinimumFunction Others
            VariableReference RUE_FN: VariableName=[Leaf].Photosynthesis.FN.Value()
            VariableReference RUE_FVPD: VariableName=[Leaf].Photosynthesis.FVPD.Value()
        LinearInterpolationFunction FrostFraction: XProperty=[Weather].MinT
          XYPairs: X=[-1, 0]; Y=[0, 0]
        BiomassRemoval BiomassRemovalDefaults
          OrganBiomassRemovalType Harvest: FractionLiveToRemove=0; FractionDeadToRemove=0; FractionLiveToResidue=0.3; FractionDeadToResidue=0
          OrganBiomassRemovalType Cut: FractionLiveToRemove=0.8; FractionDeadToRemove=0; FractionLiveToResidue=0; FractionDeadToResidue=0
          OrganBiomassRemovalType Prune: FractionLiveToRemove=0; FractionDeadToRemove=0; FractionLiveToResidue=0.6; FractionDeadToResidue=0
          OrganBiomassRemovalType Graze: FractionLiveToRemove=0.6; FractionDeadToRemove=0; FractionLiveToResidue=0.1; FractionDeadToResidue=0
        Constant StructuralFraction: FixedValue=0.5
        Constant DMConversionEfficiency: FixedValue=1
        Constant RemobilisationCost: FixedValue=0
        Constant CarbonConcentration: FixedValue=0.4
        Constant StomatalConductanceCO2Modifier: FixedValue=1
      GenericOrgan Stem
        EnergyBalance: Albedo=0.2; Gsmax350=0.015; R50=150; KDead=0; LAIDead=0
          MinimumFunction FRGRFunction: same as Replacements.FieldPea.Shell.EnergyBalance.FRGRFunction
          Constant StomatalConductanceCO2Modifier: FixedValue=1
          VariableReference HeightFunction: VariableName=[FieldPea].Leaf.Height
          Constant GAIDeadFunction: FixedValue=1
          MultiplyFunction GAIFunctionVol
            Constant VolumeToArea: FixedValue=1.5
            DivideFunction Volume
              VariableReference Wt: VariableName=[Stem].Wt
              Constant Density: FixedValue=1000; Units=g/l
          Constant ExtinctionCoefficientFunction: FixedValue=0.4
          MultiplyFunction GAIFunction
            Constant MassToArea: FixedValue=0.000356
            VariableReference Weight: VariableName=[Stem].Live.Wt
          VariableReference DepthFunction: VariableName=[FieldPea].Leaf.Height
        Constant NReallocationFactor: FixedValue=0
        Constant NRetranslocationFactor: FixedValue=0.1
        Constant DMRetranslocationFactor: FixedValue=0.1
        Constant MaximumNConc: FixedValue=0.03
        Constant MinimumNConc: FixedValue=0.01
        PhaseBasedSwitch NitrogenDemandSwitch: Start=Emergence; End=EndGrainFill
        BiomassRemoval BiomassRemovalDefaults: same as Replacements.FieldPea.Nodule.BiomassRemovalDefaults
        Constant InitialWtFunction: FixedValue=0; Units=g/m^2
        Constant SenescenceRate: FixedValue=0; Units=/d
        Constant DetachmentRateFunction: FixedValue=0; Units=/d
        Constant MaintenanceRespirationFunction: FixedValue=0; Units=0-1
        Constant DMConversionEfficiency: FixedValue=1; Units=0-1
        Constant DMReallocationFactor: FixedValue=0
        VariableReference CriticalNConc: VariableName=[Stem].MinimumNConc.Value()
        Constant RemobilisationCost: FixedValue=0
        Constant CarbonConcentration: FixedValue=0.4
        BiomassDemand DMDemands
          PhaseLookup Structural
            PhaseLookupValue Vegetative: Start=Emergence; End=EndFlowering
              MultiplyFunction Structural
                InternodeDemandFunction DMDemandFunction
                  Constant InterNodeWt: FixedValue=0.1
                Constant StructuralFraction: FixedValue=0.7
            PhaseLookupValue Reproductive: Start=EndFlowering; End=HarvestRipe
              Constant Zero: FixedValue=0.4
          PhaseLookup Storage
            PhaseLookupValue Vegetative: Start=Emergence; End=EndFlowering
              StorageDMDemandFunction Storage
                SubtractFunction StorageFraction
                  Constant One: FixedValue=0.7
                  VariableReference StructuralFraction
                    VariableName=[Stem].DMDemands.Structural.Vegetative.Structural.StructuralFraction.Value()
            PhaseLookupValue Reproductive: Start=EndFlowering; End=HarvestRipe
              Constant Zero: FixedValue=0.4
          PhaseLookup Metabolic
            PhaseLookupValue Vegetative: Start=Emergence; End=EndFlowering
              StorageDMDemandFunction Metabolic
                SubtractFunction StorageFraction
                  Constant One: FixedValue=1
                  VariableReference StructuralFraction
                    VariableName=[Stem].DMDemands.Structural.Vegetative.Structural.StructuralFraction.Value()
            PhaseLookupValue Reproductive: Start=EndFlowering; End=HarvestRipe
              Constant Zero: FixedValue=0.4
        BiomassDemand NDemands
          MultiplyFunction Structural
            VariableReference MinNconc: VariableName=[Stem].minimumNconc.Value()
            VariableReference PotentialDMAllocation: VariableName=[Stem].potentialDMAllocation.Structural
          MultiplyFunction Metabolic
            SubtractFunction MetabolicNconc
              VariableReference CritNconc: VariableName=[Stem].criticalNConc.Value()
              VariableReference MinNconc: VariableName=[Stem].minimumNconc.Value()
            VariableReference PotentialDMAllocation: VariableName=[Stem].potentialDMAllocation.Structural
          StorageNDemandFunction Storage
            VariableReference NitrogenDemandSwitch: VariableName=[Stem].nitrogenDemandSwitch.Value()
            VariableReference MaxNconc: VariableName=[Stem].maximumNconc.Value()
        RUEModel Photosynthesis
          Constant RUE: FixedValue=1.5
          WeightedTemperatureFunction FT: MaximumTemperatureWeighting=0.5
            XYPairs: X=[0, 15, 30, 40]; Y=[0, 1, 1, 0]
          LinearInterpolationFunction FVPD: XProperty=[Leaf].Photosynthesis.VPD
            XYPairs: X=[0, 10, 50]; Y=[1, 1, 1]
          LinearInterpolationFunction FN: XProperty=[Leaf].Fn
            XYPairs: X=[0, 1, 1.5]; Y=[1, 1, 1]
          LinearInterpolationFunction FW: XProperty=[Leaf].Fw
            XYPairs: X=[0, 1, 1.5]; Y=[1, 1, 1]
          RUECO2Function FCO2: PhotosyntheticPathway=C3
          Memo
            Ayaz eta 2004 presented a RUE of 1.6 g/MJ PAR during non-limiting temperature conditions for field pea.  Halving this to make it total radiation gives 0.8 g/MJ and adding 20% to account for root and  nodule production and N fixiation costs gives 1.0 g/MJ
          VariableReference RadnInt: VariableName=[Stem].EnergyBalance.RadIntTot
        RetranslocateNonStructural RetranslocateNitrogen
      CompositeBiomass AboveGround: DMDOfStructural=0.6
        Propertys=[[Leaf].Live, [Leaf].Dead, [Stem].Live, [Stem].Dead, [Grain].Live, [Grain].Dead, [Shell].Live, [Shell].Dead]
      CompositeBiomass BelowGround: Propertys=[[Root].Live, [Root].Dead, [Nodule].Live, [Nodule].Dead]; DMDOfStructural=0.6
      CompositeBiomass Total: DMDOfStructural=0.6
        Propertys=[[Leaf].Live, [Leaf].Dead, [Stem].Live, [Stem].Dead, [Grain].Live, [Grain].Dead, [Shell].Live, [Shell].Dead, [Root].Live, [Root].Dead, [Nodule].Live, [Nodule].Dead]
      CompositeBiomass TotalLive: DMDOfStructural=0.6
        Propertys=[[Leaf].Live, [Stem].Live, [Grain].Live, [Shell].Live, [Root].Live, [Nodule].Live]
      CompositeBiomass TotalDead: DMDOfStructural=0.6
        Propertys=[[Leaf].Dead, [Stem].Dead, [Grain].Dead, [Shell].Dead, [Root].Dead, [Nodule].Dead]
      CompositeBiomass Pod: Propertys=[[Shell].Live, [Shell].Dead, [Grain].Live, [Grain].Dead]; DMDOfStructural=0.6
      Cultivar Primo
      Cultivar Rex
      Cultivar Excel
      Cultivar Kaspa
      Cultivar Mutka
      Cultivar Parafield
      Cultivar Parv
      Cultivar Crusader
      Cultivar Massey
        Command:
          [Phenology].Vegetative.CompletionNodeNumber.XYPairs.X = 13,16
          [Phenology].Vegetative.CompletionNodeNumber.XYPairs.Y = 8.2, 7.5
          [Phenology].Flowering.CompletionNodeNumber.FloweringNodes.XYPairs.X = 14,16
          [Phenology].Flowering.CompletionNodeNumber.FloweringNodes.XYPairs.Y = 6.5, 4
      Cultivar Patea
        Command:
          [Phenology].Vegetative.CompletionNodeNumber.XYPairs.X = 12,16
          [Phenology].Vegetative.CompletionNodeNumber.XYPairs.Y = 12,10.9
          [Phenology].Flowering.CompletionNodeNumber.FloweringNodes.XYPairs.X = 14,16
          [Phenology].Flowering.CompletionNodeNumber.FloweringNodes.XYPairs.Y = 6,4
      Cultivar Trounce
        Command:
          [Phenology].Vegetative.CompletionNodeNumber.XYPairs.X = 12,16
          [Phenology].Vegetative.CompletionNodeNumber.XYPairs.Y = 13.7,12
          [Phenology].Flowering.CompletionNodeNumber.FloweringNodes.XYPairs.X = 14,16
          [Phenology].Flowering.CompletionNodeNumber.FloweringNodes.XYPairs.Y = 6,3
      Cultivar Rovar
        Command:
          [Phenology].Vegetative.CompletionNodeNumber.XYPairs.X = 12,16
          [Phenology].Vegetative.CompletionNodeNumber.XYPairs.Y = 13.7,12
          [Phenology].Flowering.CompletionNodeNumber.FloweringNodes.XYPairs.X = 14,16
          [Phenology].Flowering.CompletionNodeNumber.FloweringNodes.XYPairs.Y = 5,5
      Cultivar Whero
        Command:
          [Phenology].Vegetative.CompletionNodeNumber.XYPairs.X = 12,16
          [Phenology].Vegetative.CompletionNodeNumber.XYPairs.Y = 18,18
          [Phenology].Flowering.CompletionNodeNumber.FloweringNodes.XYPairs.X = 13,16
          [Phenology].Flowering.CompletionNodeNumber.FloweringNodes.XYPairs.Y = 4,4
      Memo
        ## References

        ### **Ayaz S, McKenzie BA, McNeil DL, Hill GD.** **2004**. Light interception and utilization of four grain legumes sown at different plant populations and depths. _Journal of Agricultural Science,_ **142**: 297-308.
         **Ayaz S, McKenzie BA, Hill GD, McNeil DL.** **2004**. Variability in yield of four grain legume species in a subhumid temperate environment. II. Yield components. _Journal of Agricultural Science,_ **142**: 21-28.
         **Ayaz S, McKenzie BA, Hill GD, McNeil DL.** **2004**. Nitrogen distribution in four grain legumes. _Journal of Agricultural Science,_ **142**: 309-317.
         **Wilson DR, Robertson MJ.** **1996.** Pea phenology responses to temperature and photoperiod. _Australian Agronomy Society_.
      Cultivar A_green
        Command:
          [Stem].DMDemands.Structural.Vegetative.Structural.DMDemandFunction.InterNodeWt.FixedValue = 0.1
          [Phenology].GrainFilling.Target.FixedValue = 750
      Cultivar B_yellow
        Command:
          [Stem].DMDemands.Structural.Vegetative.Structural.DMDemandFunction.InterNodeWt.FixedValue = 0.1
          [Phenology].GrainFilling.Target.FixedValue = 1000
    Report: EventNames=[Clock].DoReport
      VariableNames:
        [Clock].Today
        [FieldPea].Phenology.CurrentStageName
        [FieldPea].AboveGround.Wt as AboveGround.Wt
        [FieldPea].Leaf.Live.Wt as Leaf.Live.Wt
        [FieldPea].Stem.Live.Wt as Stem.Live.Wt
        [FieldPea].Shell.Live.Wt as Pod.Live.Wt
        [FieldPea].Grain.Live.Wt as  Grain.Live.Wt
        [FieldPea].Leaf.LAI
        [FieldPea].Stem.EnergyBalance.GAIFunction as StemGAI
        [FieldPea].Shell.EnergyBalance.GAIFunction as PodGAI
        [FieldPea].Leaf.CoverTotal
        [FieldPea].Structure.LeafTipsAppeared
        [FieldPea].Leaf.Nconc
        [FieldPea].Stem.Nconc
        [FieldPea].Grain.Nconc
        ([FieldPea].Leaf.LAI+[FieldPea].Stem.EnergyBalance.LAI+[FieldPea].Shell.EnergyBalance.LAI) as GAI
        [FieldPea].Stem.N as Stem.N
  DataStore
    Input Observed: FileName=AllObservedData_Pea.prn
      ErrorMessage:
        Invalid number of values on line: Early                                                           811.6820838             0       0           0       0 811.6820838               0*          *         *             *              *
        in file: C:\GithubRepos\PeaModelling\AllObservedData_Pea.prn
    PredictedObserved: PredictedTableName=Report; ObservedTableName=Observed; FieldNameUsedForMatch=Clock.Today
  Experiment Lincoln
    DisabledSimNames=[LincolnCultASowEarlyNitEarly, LincolnCultASowMidNitNil, LincolnCultASowLateNitNil, LincolnCultASowMidNitEarly, LincolnCultBSowMidNitEarly, LincolnCultASowLateNitEarly, LincolnCultBSowLateNitEarly, LincolnCultASowEarlyNitLate, LincolnCultASowMidNitLate, LincolnCultBSowMidNitLate, LincolnCultASowLateNitLate, LincolnCultBSowLateNitLate]
    Factors
      Memo
        Trt_num Cultivar Sowing_Date N_timing

        1 Cult A Early 0N

        2 Cult B Early 0N

        3 Cult B Early Early N

        4 Cult B Early Late N

        5 Cult B Mid 0N

        6 Cult B Late 0N
      Factor Cult
        CompositeFactor A: Specifications=[FieldPeaSowingRule].Script.CultivarName = A_Green
        CompositeFactor B: Specifications=[FieldPeaSowingRule].Script.CultivarName = B_Yellow
      Factor Sow
        CompositeFactor Early: Specifications=[FieldPeaSowingRule].Script.SowingDate = 9-Oct-18
        CompositeFactor Mid: Specifications=[FieldPeaSowingRule].Script.SowingDate = 29-Oct-18
        CompositeFactor Late: Specifications=[FieldPeaSowingRule].Script.SowingDate = 19-Nov-18
      Factor Nit
        CompositeFactor Nil
          Specifications:
            [FieldPeaSowingRule].Script.FertDate = 9-Oct-18
            [FieldPeaSowingRule].Script.FertAmt = 0
          Operations N_App
        CompositeFactor Early
          Specifications:
            [FieldPeaSowingRule].Script.FertDate = 9-Oct-18
            [FieldPeaSowingRule].Script.FertAmt = 100
          Operations N_App
            2018-10-09  [Fertiliser].Apply(0, Fertiliser.Types.UreaN, 100);
        CompositeFactor Late
          Specifications:
            [FieldPeaSowingRule].Script.FertDate = 1-Jan-19
            [FieldPeaSowingRule].Script.FertAmt = 100
          Operations N_App
            2018-10-09  [Fertiliser].Apply(0, Fertiliser.Types.NO3N, 50);
    Simulation A_Block
      Clock: StartDate=2018-10-01; EndDate=2019-02-15
      Summary summaryfile
      Weather: FileName=Lincoln.met
      SoilArbitrator Soil Arbitrator
      Zone paddock: Area=1; Slope=0
        Soil: Latitude=0; Longitude=0
          Analysis: Thickness=[100, 200, 300, 300, 300, 300]; PH=[6.6, 6.2, 5.7, 5.5, 5.5, 5.5]; PHUnits=Water; BoronUnits=0
          InitialWater Initial water: PercentMethod=1; FractionFull=1
          Water
            Thickness  BD   AirDry  LL15  DUL   SAT
            100        1.2  0.08    0.13  0.33  0.5
            200        1.2  0.13    0.13  0.33  0.5
            300        1.2  0.1     0.1   0.31  0.44
            300        1.2  0.06    0.06  0.15  0.46
            300        1.2  0.04    0.04  0.1   0.44
            300        1.2  0.02    0.02  0.06  0.44
            SoilCrop FieldPeaSoil: LL=[0.13, 0.13, 0.1, 0.08, 0.11, 0.11]; KL=[0.06, 0.06, 0.06, 0.06, 0.06, 0.06]; XF=[1, 1, 1, 1, 1, 1]
          SoilWater: SummerDate=1-Nov; SummerU=9; SummerCona=4.4; WinterDate=1-Apr; WinterU=9; WinterCona=4.4; DiffusConst=88; DiffusSlope=35.4; Salb=0.18; CN2Bare=68; CNRed=20; CNCov=0.8; max_pond=0; Thickness=[100, 200, 300, 300, 300, 300]; SWCON=[0.55, 0.55, 0.55, 0.55, 0.55, 0.55]; ResidueInterception=0
          SoilNitrogen: fom_types=[default, manure, mucuna, lablab, shemp, stable]; fract_carb=[0.2, 0.3, 0.54, 0.57, 0.45, 0]; fract_cell=[0.7, 0.3, 0.37, 0.37, 0.47, 0.1]; fract_lign=[0.1, 0.4, 0.09, 0.06, 0.08, 0.9]
            SoilNitrogenNO3 NO3
            SoilNitrogenNH4 NH4
            SoilNitrogenUrea Urea
            SoilNitrogenPlantAvailableNO3 PlantAvailableNO3
            SoilNitrogenPlantAvailableNH4 PlantAvailableNH4
          SoilOrganicMatter: RootCN=30; EnrACoeff=7.4; EnrBCoeff=0.2; OCUnits=Total
            Thickness  OC   SoilCN  FBiom  FInert  RootWt
            100        0.1  11.5    0.025  0.96    1243.93
            200        0.1  11.5    0.025  0.96    833.832
            300        0.1  11.5    0.015  0.96    457.617
            300        0.1  11.5    0.01   0.96    251.145
            300        0.1  11.5    0.01   0.96    137.831
            300        0.1  11.5    0.01   0.96    75.6435
          Sample: Thickness=[100, 200, 300, 300, 300, 300]; NO3N={Values=[7, 5, 3, 5, 0, 0], StoredAsPPM=false}; NH4N={Values=[0.1, 0, 0, 0, 0, 0], StoredAsPPM=true}; SWUnits=Volumetric; OCUnits=Total; PHUnits=Water
          CERESSoilTemperature
        MicroClimate: a_interception=0; b_interception=1; c_interception=0; d_interception=0; soil_albedo=0.23; SoilHeatFluxFraction=0.4; NightInterceptionFraction=0.5; ReferenceHeight=2
        Irrigation
        Fertiliser
        SurfaceOrganicMatter surface organic matter: InitialResidueName=wheat; InitialResidueType=wheat; InitialResidueMass=0; InitialStandingFraction=0; InitialCPR=0; InitialCNR=80; FractionFaecesAdded=0.5
        Report LincReport: EventNames=[Clock].DoReport
          VariableNames:
            [Clock].Today
            [FieldPea].Phenology.CurrentStageName
            [FieldPea].AboveGround.Wt
            [FieldPea].Leaf.Live.Wt
            [FieldPea].Stem.Live.Wt
            [FieldPea].Shell.Live.Wt
            [FieldPea].Grain.Live.Wt
            [FieldPea].Leaf.LAI
            [FieldPea].Stem.EnergyBalance.GAIFunction as StemGAI
            [FieldPea].Shell.EnergyBalance.GAIFunction as PodGAI
            [FieldPea].Leaf.CoverTotal
            [FieldPea].Structure.LeafTipsAppeared
            [FieldPea].Leaf.Nconc
            [FieldPea].Stem.Nconc
            [FieldPea].Grain.Nconc
            ([FieldPea].Leaf.LAI+[FieldPea].Stem.EnergyBalance.GAIFunction+[FieldPea].Shell.EnergyBalance.GAIFunction) as GAI
        Manager FieldPeaSowingRule
          CultivarName = Primo
          SowingDate = 1997-12-23
          FertDate = 0001-01-01
          FertAmt = 0
          RowSpacing = 135
          SowingDepth = 5
          SowingRate = 100
```csharp
        using System;
        using Models.Core;
        using Models.PMF;
        using APSIM.Shared.Utilities;
        using Models;
        
        namespace Models
        {
           [Serializable] 
           [System.Xml.Serialization.XmlInclude(typeof(Model))]
            public class Script : Model
            {      
               [Link] Plant FieldPea;
               [Link] Clock Clock;
               [Link] Fertiliser Fert;

                [Description("Spacing (mm) between rows")]
               public double RowSpacing { get; set; }
               [Description("Depth (mm) Grains are planted")]
               public double SowingDepth { get; set; }
               [Description("Seeds sown (/m2)")]
               public double SowingRate { get; set; }
               [Description("Cultivar")]
               [Display(Type=DisplayType.CultivarName)]
               public string CultivarName { get; set; }
               [Description("Sowing Date")]
               public DateTime SowingDate { get; set; }
               [Description("Fertiliser Date")]
               public DateTime FertDate { get; set; }
               [Description("Fert Amount")]
               public double FertAmt { get; set; }


               [EventSubscribe("DoManagement")]
               private void OnDoManagement(object sender, EventArgs e)
               {
                
                if (Clock.Today.Date == SowingDate)
                    {
                    FieldPea.Sow(population:SowingRate, cultivar:CultivarName, depth:SowingDepth, rowSpacing:RowSpacing, budNumber:1);
  
                    }

                if (Clock.Today.Date == FertDate)
                    {
                    Fert.Apply(FertAmt, Fertiliser.Types.UreaN, 0);
                    }
                
               }
            }
        }
```
        Manager FieldPeaHarvestRule
```csharp
        using System;
        using Models.Core;
        using Models.PMF;
        using System.Xml.Serialization;
        using APSIM.Shared.Utilities;
        
        namespace Models
        {
           [Serializable] 
           [System.Xml.Serialization.XmlInclude(typeof(Model))]
            public class Script : Model
            {      
               [Link] Plant FieldPea;
               [Link] Clock Clock;
               [Link] Summary Summary;
               [XmlIgnore] public string FinalTag { get; set;}
               [XmlIgnore] public bool Harvested {get; set;}
               [XmlIgnore] public bool ReadyForHarvest {get; set;}
               
               [EventSubscribe("Commencing")]
               private void OnSimulationCommencing(object sender, EventArgs e)
               {
               FinalTag = "";
                   ReadyForHarvest = false;
                  Harvested = false;
               }
               
               [EventSubscribe("DoManagement")]
               private void OnDoManagement(object sender, EventArgs e)
               {
               if (ReadyForHarvest == true)
                   {
                   FieldPea.Harvest();
                   FieldPea.EndCrop();
                   ReadyForHarvest = false;
                   Harvested = true;
                   }
               FinalTag = "";    
               }
               
               [EventSubscribe("DoManagementCalculations")]
               private void OnDoManagementCalculations(object sender, EventArgs e)
               {
                if ((FieldPea.Phenology.Stage >= 8)&&(Harvested == false))
                {
                    FinalTag = "yield";
                    ReadyForHarvest = true;
                }
               }
            }
        }
```
        Operations N_App
        Plant FieldPea: CropType=FieldPea; IsEnding=false; DaysAfterEnding=0
        Operations irrigations
          2019-01-03  [Irrigation].Apply(25);
          2019-01-09  [Irrigation].Apply(25);
          2019-01-28  [Irrigation].Apply(30);
          2019-02-04  [Irrigation].Apply(30);
          2019-02-18  [Irrigation].Apply(30);
        Report EnergyReport: EventNames=[Clock].DoReport
          VariableNames:
            [Clock].Today
            [FieldPea].Phenology.CurrentStageName
            [Weather].Radn
            [FieldPea].Leaf.RadIntTot
            [FieldPea].Stem.EnergyBalance.RadIntTot
            [FieldPea].Stem.EnergyBalance.CoverGreen
            [FieldPea].Leaf.Height
            [FieldPea].Stem.EnergyBalance.Height
            [FieldPea].Stem.EnergyBalance.LAI
            [FieldPea].Shell.EnergyBalance.RadIntTot
            [FieldPea].Shell.EnergyBalance.CoverGreen
            [FieldPea].Shell.EnergyBalance.Height
            [FieldPea].Shell.EnergyBalance.Depth
            [FieldPea].Shell.EnergyBalance.LAI
            [FieldPea].Leaf.DMSupply
            [FieldPea].Shell.DMSupply
            [FieldPea].Stem.DMSupply
            [FieldPea].Leaf.WaterAllocation
            [FieldPea].Leaf.WaterDemand
            [FieldPea].Stem.EnergyBalance.WaterAllocation
            [FieldPea].Stem.EnergyBalance.WaterDemand
            [FieldPea].Shell.EnergyBalance.WaterAllocation
            [FieldPea].Shell.EnergyBalance.WaterDemand
        Report: EventNames=[Clock].DoReport
  Experiment HawkesBay
    DisabledSimNames=[HawkesBayCultASowLateNitLate, HawkesBayCultASowMidNitLate, HawkesBayCultASowEarlyNitLate, HawkesBayCultASowLateNitEarly, HawkesBayCultASowMidNitEarly, HawkesBayCultASowEarlyNitEarly, HawkesBayCultASowLateNitNil, HawkesBayCultASowMidNitNil]
    Factors
      Memo
        Trt_num Cultivar Sowing_Date N_timing

        1 Cult A Early 0N

        2 Cult B Early 0N

        3 Cult B Early Early N

        4 Cult B Early Late N

        5 Cult B Mid 0N

        6 Cult B Late 0N
      Factor Cult
        CompositeFactor A: Specifications=[FieldPeaSowingRule].Script.CultivarName = A_Green
        CompositeFactor B: Specifications=[FieldPeaSowingRule].Script.CultivarName = B_Yellow
      Factor Sow
        CompositeFactor Early: Specifications=[FieldPeaSowingRule].Script.SowingDate = 5-Oct-18
        CompositeFactor Mid: Specifications=[FieldPeaSowingRule].Script.SowingDate = 26-Oct-18
        CompositeFactor Late: Specifications=[FieldPeaSowingRule].Script.SowingDate = 29-Nov-18
      Factor Nit
        CompositeFactor Nil
          Specifications:
            [FieldPeaSowingRule].Script.FertDate = 9-Oct-18
            [FieldPeaSowingRule].Script.FertAmt = 0
          Operations N_App
        CompositeFactor Early
          Specifications:
            [FieldPeaSowingRule].Script.FertDate = 5-Oct-18
            [FieldPeaSowingRule].Script.FertAmt = 100
          Operations N_App
            2018-11-27  [Fertiliser].Apply(0, Fertiliser.Types.UreaN, 100);
        CompositeFactor Late
          Specifications:
            [FieldPeaSowingRule].Script.FertDate = 1-Jan-19
            [FieldPeaSowingRule].Script.FertAmt = 100
          Operations N_App
            2018-11-27  [Fertiliser].Apply(0, Fertiliser.Types.UreaN, 50);
            2018-11-29  [Fertiliser].Apply(0, Fertiliser.Types.UreaN, 50);
    Simulation H_Block
      Clock: StartDate=2018-10-01; EndDate=2019-02-15
      Summary summaryfile
      Weather: FileName=Whakatu.met
      SoilArbitrator Soil Arbitrator
      Zone paddock: Area=1; Slope=0
        Soil: Latitude=0; Longitude=0
          Analysis: same as Lincoln.A_Block.paddock.Soil.Analysis
          InitialWater Initial water: PercentMethod=1; FractionFull=1
          Water
            Thickness  BD    AirDry  LL15  DUL   SAT
            100        1.11  0.08    0.13  0.33  0.5
            200        1.2   0.13    0.13  0.33  0.5
            300        1.2   0.1     0.1   0.31  0.44
            300        1.45  0.06    0.06  0.15  0.46
            300        1.61  0.04    0.04  0.1   0.44
            300        1.2   0.02    0.02  0.06  0.44
            SoilCrop FieldPeaSoil: LL=[0.13, 0.13, 0.1, 0.08, 0.11, 0.11]; KL=[0.06, 0.06, 0.06, 0.06, 0.06, 0.06]; XF=[1, 1, 1, 1, 1, 1]
          SoilWater: same as Lincoln.A_Block.paddock.Soil.SoilWater
          SoilNitrogen: same as Lincoln.A_Block.paddock.Soil.SoilNitrogen
          SoilOrganicMatter: same as Lincoln.A_Block.paddock.Soil.SoilOrganicMatter
          Sample: Thickness=[150, 150, 300, 300, 300, 300]; NO3N={Values=[8.11, 5.92, 1.62, 0.99, 0, 0], StoredAsPPM=true}; NH4N={Values=[1.15, 0.91, 0.34, 0.28, 0, 0], StoredAsPPM=true}; SWUnits=Volumetric; OCUnits=Total; PHUnits=Water
          CERESSoilTemperature
        MicroClimate: a_interception=0; b_interception=1; c_interception=0; d_interception=0; soil_albedo=0.23; SoilHeatFluxFraction=0.4; NightInterceptionFraction=0.5; ReferenceHeight=2
        Irrigation
        Fertiliser
        SurfaceOrganicMatter surface organic matter: InitialResidueName=wheat; InitialResidueType=wheat; InitialResidueMass=0; InitialStandingFraction=0; InitialCPR=0; InitialCNR=80; FractionFaecesAdded=0.5
        Manager FieldPeaHarvestRule: same as Lincoln.A_Block.paddock.FieldPeaHarvestRule
        Operations N_App
        Plant FieldPea: CropType=FieldPea; IsEnding=false; DaysAfterEnding=0
        Operations irrigations
          2018-10-26  [Irrigation].Apply(5);
          2018-11-08  [Irrigation].Apply(10);
          2018-11-18  [Irrigation].Apply(15);
          2019-01-03  [Irrigation].Apply(20);
          2019-01-11  [Irrigation].Apply(20);
          2019-01-25  [Irrigation].Apply(20);
        Report HBReport: EventNames=[Clock].DoReport
          VariableNames:
            [Clock].Today
            [FieldPea].Phenology.CurrentStageName
            [FieldPea].AboveGround.Wt
            [FieldPea].Leaf.Live.Wt
            [FieldPea].Stem.Live.Wt
            [FieldPea].Shell.Live.Wt
            [FieldPea].Grain.Live.Wt
            [FieldPea].Leaf.LAI
            [FieldPea].Leaf.CoverTotal
            [FieldPea].Structure.LeafTipsAppeared
            [FieldPea].Leaf.Nconc
            [FieldPea].Stem.Nconc
            [FieldPea].Grain.Nconc
        Manager FieldPeaSowingRule: same as Lincoln.A_Block.paddock.FieldPeaSowingRule
        Report: EventNames=[Clock].DoReport
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